# Power consumtion - ImageCompressionApp
R_shunt := 10 Ω
V_batt := 2.000 V
V_sum.raw := 396.88 mV*s
E_send.raw := V_sum.raw/R_shunt*V_batt
E_send.raw = 0.079376 J
V_sum.comp := 25 mV*s
E_send.comp := V_sum.raw/R_shunt*V_batt
E_send.comp = 0.079376 J
